Clear

Set DefaultBaseFrequency=50

! Swing or Source Bar
New circuit.trafo10_lvnetwork0_1 phases=3 pu=1.0 basekv=10.0 bus1=mv_import_joint_trafo10_lvnetwork0

! Trafo XFMRCodes
Redirect XFMRCode.dss

! Trafo
New Transformer.transformer63 Xfmrcode=testtrafotype Buses=[mv_import_joint_trafo10_lvnetwork0  lvjoint65.1.2.3] kVs=[10.0 0.4]

! LineCodes
Redirect LineCode.dss

! Lines
New Line.lv_cable_trafo10_lvnetwork0_2_main_grid Phases=4 Bus1=lvjoint65.1.2.3.0 Bus2=lv_node_trafo10_lvnetwork0_2.1.2.3.4 LineCode=lv_line Length=20.937011479722383 Units=m
New Line.lv_cable_trafo10_lvnetwork0_to_home_0_arch3 Phases=4 Bus1=lv_node_trafo10_lvnetwork0_2.1.2.3.4 Bus2=2xhome833.1.2.3.4 LineCode=lv_line_to_home Length=9.380287628855761 Units=m
New Line.lv_cable_trafo10_lvnetwork0_3_main_grid Phases=4 Bus1=lv_node_trafo10_lvnetwork0_2.1.2.3.4 Bus2=lv_node_trafo10_lvnetwork0_3.1.2.3.4 LineCode=lv_line Length=30.35267804357668 Units=m

! Load Definitions
New Load.2xhome833_Ph1 Bus1=2xhome833.1.4 Phases=1 Conn=wye Model=1 kV=0.23 kW=1 kvar=0.0
New Load.2xhome833_Ph2 Bus1=2xhome833.2.4 Phases=1 Conn=wye Model=1 kV=0.23 kW=1 kvar=0.0
New Load.2xhome833_Ph3 Bus1=2xhome833.3.4 Phases=1 Conn=wye Model=1 kV=0.23 kW=1 kvar=0.0

! Final Configurations
Set VoltageBases = [10.0, 0.4]
CalcVoltageBases
SetkVBase Bus=mv_import_joint_trafo10_lvnetwork0 kVLL=10.0
SetkVBase Bus=lvjoint65 kVLL=0.4

! Solve
Set mode=snapshot
! Solve
