Clear

Set DefaultBaseFrequency=50

! Swing or Source Bar
New circuit.trafo12_lvnetwork0_1 phases=3 pu=1.0 basekv=10.0 bus1=mv_import_joint_trafo12_lvnetwork0

! Trafo XFMRCodes
Redirect XFMRCode.dss

! Trafo
New Transformer.transformer73 Xfmrcode=testtrafotype Buses=[mv_import_joint_trafo12_lvnetwork0  lvjoint75.1.2.3] kVs=[10.0 0.4]

! LineCodes
Redirect LineCode.dss

! Lines
New Line.lv_cable_trafo12_lvnetwork0_2_main_grid Phases=4 Bus1=lvjoint75.1.2.3.0 Bus2=lv_node_trafo12_lvnetwork0_2.1.2.3.4 LineCode=lv_line Length=73.68251828472545 Units=m
New Line.lv_cable_trafo12_lvnetwork0_to_home_1_arch3 Phases=4 Bus1=lv_node_trafo12_lvnetwork0_2.1.2.3.4 Bus2=1xhome1024.1.2.3.4 LineCode=lv_line_to_home Length=5.784719612875807 Units=m
New Line.lv_cable_trafo12_lvnetwork0_3_main_grid Phases=4 Bus1=lv_node_trafo12_lvnetwork0_2.1.2.3.4 Bus2=lv_node_trafo12_lvnetwork0_3.1.2.3.4 LineCode=lv_line Length=7.233425983586673 Units=m
New Line.lv_cable_trafo12_lvnetwork0_to_home_0_arch3 Phases=4 Bus1=lv_node_trafo12_lvnetwork0_3.1.2.3.4 Bus2=1xhome1023.1.2.3.4 LineCode=lv_line_to_home Length=0.5243961607677949 Units=m
New Line.lv_cable_trafo12_lvnetwork0_4_main_grid Phases=4 Bus1=lv_node_trafo12_lvnetwork0_3.1.2.3.4 Bus2=lv_node_trafo12_lvnetwork0_4.1.2.3.4 LineCode=lv_line Length=23.691391925206055 Units=m
New Line.lv_cable_trafo12_lvnetwork0_5_main_grid Phases=4 Bus1=lv_node_trafo12_lvnetwork0_4.1.2.3.4 Bus2=lv_node_trafo12_lvnetwork0_5.1.2.3.4 LineCode=lv_line Length=39.77913349737619 Units=m
New Line.lv_cable_trafo12_lvnetwork0_to_home_2_arch3 Phases=4 Bus1=lv_node_trafo12_lvnetwork0_5.1.2.3.4 Bus2=1xhome1025.1.2.3.4 LineCode=lv_line_to_home Length=3.1405653500848074 Units=m
New Line.lv_cable_trafo12_lvnetwork0_6_main_grid Phases=4 Bus1=lv_node_trafo12_lvnetwork0_5.1.2.3.4 Bus2=lv_node_trafo12_lvnetwork0_6.1.2.3.4 LineCode=lv_line Length=50.37689432436901 Units=m

! Load Definitions
New Load.1xhome1024_Ph1 Bus1=1xhome1024.1.4 Phases=1 Conn=wye Model=1 kV=0.23 kW=1 kvar=0.0
New Load.1xhome1024_Ph2 Bus1=1xhome1024.2.4 Phases=1 Conn=wye Model=1 kV=0.23 kW=1 kvar=0.0
New Load.1xhome1024_Ph3 Bus1=1xhome1024.3.4 Phases=1 Conn=wye Model=1 kV=0.23 kW=1 kvar=0.0
New Load.1xhome1023_Ph1 Bus1=1xhome1023.1.4 Phases=1 Conn=wye Model=1 kV=0.23 kW=1 kvar=0.0
New Load.1xhome1023_Ph2 Bus1=1xhome1023.2.4 Phases=1 Conn=wye Model=1 kV=0.23 kW=1 kvar=0.0
New Load.1xhome1023_Ph3 Bus1=1xhome1023.3.4 Phases=1 Conn=wye Model=1 kV=0.23 kW=1 kvar=0.0
New Load.1xhome1025_Ph1 Bus1=1xhome1025.1.4 Phases=1 Conn=wye Model=1 kV=0.23 kW=1 kvar=0.0
New Load.1xhome1025_Ph2 Bus1=1xhome1025.2.4 Phases=1 Conn=wye Model=1 kV=0.23 kW=1 kvar=0.0
New Load.1xhome1025_Ph3 Bus1=1xhome1025.3.4 Phases=1 Conn=wye Model=1 kV=0.23 kW=1 kvar=0.0

! Final Configurations
Set VoltageBases = [10.0, 0.4]
CalcVoltageBases
SetkVBase Bus=mv_import_joint_trafo12_lvnetwork0 kVLL=10.0
SetkVBase Bus=lvjoint75 kVLL=0.4

! Solve
Set mode=snapshot
! Solve
