Clear

Set DefaultBaseFrequency=50

! Swing or Source Bar
New circuit.trafo15_lvnetwork1_1 phases=3 pu=1.0 basekv=10.0 bus1=mv_import_joint_trafo15_lvnetwork1

! Trafo XFMRCodes
Redirect XFMRCode.dss

! Trafo
New Transformer.transformer91 Xfmrcode=testtrafotype Buses=[mv_import_joint_trafo15_lvnetwork1  lvjoint93.1.2.3] kVs=[10.0 0.4]

! LineCodes
Redirect LineCode.dss

! Lines
New Line.lv_cable_trafo15_lvnetwork1_2_main_grid Phases=4 Bus1=lvjoint93.1.2.3.0 Bus2=lv_node_trafo15_lvnetwork1_2.1.2.3.4 LineCode=lv_line Length=64.99878951027715 Units=m
New Line.lv_cable_trafo15_lvnetwork1_3_main_grid Phases=4 Bus1=lv_node_trafo15_lvnetwork1_2.1.2.3.4 Bus2=lv_node_trafo15_lvnetwork1_3.1.2.3.4 LineCode=lv_line Length=6.434678726199486 Units=m
New Line.lv_cable_trafo15_lvnetwork1_to_home_0_arch4 Phases=4 Bus1=lv_node_trafo15_lvnetwork1_3.1.2.3.4 Bus2=1xhome1790.1.2.3.4 LineCode=lv_line_to_home Length=1.891327436719724 Units=m
New Line.lv_cable_trafo15_lvnetwork1_4_main_grid Phases=4 Bus1=lv_node_trafo15_lvnetwork1_3.1.2.3.4 Bus2=lv_node_trafo15_lvnetwork1_4.1.2.3.4 LineCode=lv_line Length=20.426528373437886 Units=m
New Line.lv_cable_trafo15_lvnetwork1_to_home_1_arch4 Phases=4 Bus1=lv_node_trafo15_lvnetwork1_4.1.2.3.4 Bus2=1xhome1791.1.2.3.4 LineCode=lv_line_to_home Length=1.6730468643678595 Units=m
New Line.lv_cable_trafo15_lvnetwork1_5_main_grid Phases=4 Bus1=lv_node_trafo15_lvnetwork1_4.1.2.3.4 Bus2=lv_node_trafo15_lvnetwork1_5.1.2.3.4 LineCode=lv_line Length=6.0643828195028515 Units=m
New Line.lv_cable_trafo15_lvnetwork1_to_home_2_arch4 Phases=4 Bus1=lv_node_trafo15_lvnetwork1_5.1.2.3.4 Bus2=1xhome1792.1.2.3.4 LineCode=lv_line_to_home Length=1.6492860674142233 Units=m
New Line.lv_cable_trafo15_lvnetwork1_6_main_grid Phases=4 Bus1=lv_node_trafo15_lvnetwork1_5.1.2.3.4 Bus2=lv_node_trafo15_lvnetwork1_6.1.2.3.4 LineCode=lv_line Length=6.368024498079295 Units=m
New Line.lv_cable_trafo15_lvnetwork1_to_home_3_arch4 Phases=4 Bus1=lv_node_trafo15_lvnetwork1_6.1.2.3.4 Bus2=1xhome1793.1.2.3.4 LineCode=lv_line_to_home Length=1.6239192117588765 Units=m
New Line.lv_cable_trafo15_lvnetwork1_7_main_grid Phases=4 Bus1=lv_node_trafo15_lvnetwork1_6.1.2.3.4 Bus2=lv_node_trafo15_lvnetwork1_7.1.2.3.4 LineCode=lv_line Length=5.926441707026816 Units=m
New Line.lv_cable_trafo15_lvnetwork1_to_home_4_arch4 Phases=4 Bus1=lv_node_trafo15_lvnetwork1_7.1.2.3.4 Bus2=1xhome1794.1.2.3.4 LineCode=lv_line_to_home Length=1.5997585349195675 Units=m
New Line.lv_cable_trafo15_lvnetwork1_8_main_grid Phases=4 Bus1=lv_node_trafo15_lvnetwork1_7.1.2.3.4 Bus2=lv_node_trafo15_lvnetwork1_8.1.2.3.4 LineCode=lv_line Length=4.235765517325337 Units=m
New Line.lv_cable_trafo15_lvnetwork1_to_home_5_arch4 Phases=4 Bus1=lv_node_trafo15_lvnetwork1_8.1.2.3.4 Bus2=1xhome1795.1.2.3.4 LineCode=lv_line_to_home Length=1.6000513736400108 Units=m
New Line.lv_cable_trafo15_lvnetwork1_9_main_grid Phases=4 Bus1=lv_node_trafo15_lvnetwork1_8.1.2.3.4 Bus2=lv_node_trafo15_lvnetwork1_9.1.2.3.4 LineCode=lv_line Length=6.279178453133343 Units=m
New Line.lv_cable_trafo15_lvnetwork1_to_home_6_arch4 Phases=4 Bus1=lv_node_trafo15_lvnetwork1_9.1.2.3.4 Bus2=1xhome1796.1.2.3.4 LineCode=lv_line_to_home Length=1.625894409122564 Units=m
New Line.lv_cable_trafo15_lvnetwork1_10_main_grid Phases=4 Bus1=lv_node_trafo15_lvnetwork1_9.1.2.3.4 Bus2=lv_node_trafo15_lvnetwork1_10.1.2.3.4 LineCode=lv_line Length=6.087551897219427 Units=m
New Line.lv_cable_trafo15_lvnetwork1_to_home_7_arch4 Phases=4 Bus1=lv_node_trafo15_lvnetwork1_10.1.2.3.4 Bus2=1xhome1797.1.2.3.4 LineCode=lv_line_to_home Length=1.6501023859175312 Units=m
New Line.lv_cable_trafo15_lvnetwork1_11_main_grid Phases=4 Bus1=lv_node_trafo15_lvnetwork1_10.1.2.3.4 Bus2=lv_node_trafo15_lvnetwork1_11.1.2.3.4 LineCode=lv_line Length=6.0863245932484515 Units=m
New Line.lv_cable_trafo15_lvnetwork1_to_home_12_arch4 Phases=4 Bus1=lv_node_trafo15_lvnetwork1_11.1.2.3.4 Bus2=1xhome1802.1.2.3.4 LineCode=lv_line_to_home Length=1.6747994763060519 Units=m
New Line.lv_cable_trafo15_lvnetwork1_12_main_grid Phases=4 Bus1=lv_node_trafo15_lvnetwork1_11.1.2.3.4 Bus2=lv_node_trafo15_lvnetwork1_12.1.2.3.4 LineCode=lv_line Length=9.915837354638075 Units=m
New Line.lv_cable_trafo15_lvnetwork1_to_home_8_arch4 Phases=4 Bus1=lv_node_trafo15_lvnetwork1_12.1.2.3.4 Bus2=1xhome1798.1.2.3.4 LineCode=lv_line_to_home Length=2.2999187360855116 Units=m
New Line.lv_cable_trafo15_lvnetwork1_13_main_grid Phases=4 Bus1=lv_node_trafo15_lvnetwork1_12.1.2.3.4 Bus2=lv_node_trafo15_lvnetwork1_13.1.2.3.4 LineCode=lv_line Length=6.338352317091334 Units=m
New Line.lv_cable_trafo15_lvnetwork1_to_home_9_arch4 Phases=4 Bus1=lv_node_trafo15_lvnetwork1_13.1.2.3.4 Bus2=1xhome1799.1.2.3.4 LineCode=lv_line_to_home Length=2.4266086291593134 Units=m
New Line.lv_cable_trafo15_lvnetwork1_14_main_grid Phases=4 Bus1=lv_node_trafo15_lvnetwork1_13.1.2.3.4 Bus2=lv_node_trafo15_lvnetwork1_14.1.2.3.4 LineCode=lv_line Length=6.156958188376207 Units=m
New Line.lv_cable_trafo15_lvnetwork1_to_home_10_arch4 Phases=4 Bus1=lv_node_trafo15_lvnetwork1_14.1.2.3.4 Bus2=1xhome1800.1.2.3.4 LineCode=lv_line_to_home Length=2.5492692550713603 Units=m
New Line.lv_cable_trafo15_lvnetwork1_15_main_grid Phases=4 Bus1=lv_node_trafo15_lvnetwork1_14.1.2.3.4 Bus2=lv_node_trafo15_lvnetwork1_15.1.2.3.4 LineCode=lv_line Length=6.155798758995683 Units=m
New Line.lv_cable_trafo15_lvnetwork1_to_home_11_arch4 Phases=4 Bus1=lv_node_trafo15_lvnetwork1_15.1.2.3.4 Bus2=1xhome1801.1.2.3.4 LineCode=lv_line_to_home Length=2.6727712809766997 Units=m
New Line.lv_cable_trafo15_lvnetwork1_16_main_grid Phases=4 Bus1=lv_node_trafo15_lvnetwork1_15.1.2.3.4 Bus2=lv_node_trafo15_lvnetwork1_16.1.2.3.4 LineCode=lv_line Length=15.788643821942522 Units=m
New Line.lv_cable_trafo15_lvnetwork1_to_home_17_arch4 Phases=4 Bus1=lv_node_trafo15_lvnetwork1_16.1.2.3.4 Bus2=1xhome1807.1.2.3.4 LineCode=lv_line_to_home Length=2.892781021811689 Units=m
New Line.lv_cable_trafo15_lvnetwork1_17_main_grid Phases=4 Bus1=lv_node_trafo15_lvnetwork1_16.1.2.3.4 Bus2=lv_node_trafo15_lvnetwork1_17.1.2.3.4 LineCode=lv_line Length=15.127196747603987 Units=m
New Line.lv_cable_trafo15_lvnetwork1_to_home_18_arch4 Phases=4 Bus1=lv_node_trafo15_lvnetwork1_17.1.2.3.4 Bus2=1xhome1808.1.2.3.4 LineCode=lv_line_to_home Length=2.941438937469116 Units=m
New Line.lv_cable_trafo15_lvnetwork1_18_main_grid Phases=4 Bus1=lv_node_trafo15_lvnetwork1_17.1.2.3.4 Bus2=lv_node_trafo15_lvnetwork1_18.1.2.3.4 LineCode=lv_line Length=8.562455904806376 Units=m
New Line.lv_cable_trafo15_lvnetwork1_to_home_13_arch4 Phases=4 Bus1=lv_node_trafo15_lvnetwork1_18.1.2.3.4 Bus2=1xhome1803.1.2.3.4 LineCode=lv_line_to_home Length=3.1866814658920384 Units=m
New Line.lv_cable_trafo15_lvnetwork1_19_main_grid Phases=4 Bus1=lv_node_trafo15_lvnetwork1_18.1.2.3.4 Bus2=lv_node_trafo15_lvnetwork1_19.1.2.3.4 LineCode=lv_line Length=8.437949424526392 Units=m
New Line.lv_cable_trafo15_lvnetwork1_to_home_14_arch4 Phases=4 Bus1=lv_node_trafo15_lvnetwork1_19.1.2.3.4 Bus2=1xhome1804.1.2.3.4 LineCode=lv_line_to_home Length=5.799969651378215 Units=m
New Line.lv_cable_trafo15_lvnetwork1_20_main_grid Phases=4 Bus1=lv_node_trafo15_lvnetwork1_19.1.2.3.4 Bus2=lv_node_trafo15_lvnetwork1_20.1.2.3.4 LineCode=lv_line Length=13.352811139652946 Units=m
New Line.lv_cable_trafo15_lvnetwork1_to_home_15_arch4 Phases=4 Bus1=lv_node_trafo15_lvnetwork1_20.1.2.3.4 Bus2=1xhome1805.1.2.3.4 LineCode=lv_line_to_home Length=5.864635505220453 Units=m
New Line.lv_cable_trafo15_lvnetwork1_21_main_grid Phases=4 Bus1=lv_node_trafo15_lvnetwork1_20.1.2.3.4 Bus2=lv_node_trafo15_lvnetwork1_21.1.2.3.4 LineCode=lv_line Length=6.662374131856461 Units=m
New Line.lv_cable_trafo15_lvnetwork1_to_home_16_arch4 Phases=4 Bus1=lv_node_trafo15_lvnetwork1_21.1.2.3.4 Bus2=1xhome1806.1.2.3.4 LineCode=lv_line_to_home Length=5.8324249407811095 Units=m
New Line.lv_cable_trafo15_lvnetwork1_22_main_grid Phases=4 Bus1=lv_node_trafo15_lvnetwork1_21.1.2.3.4 Bus2=lv_node_trafo15_lvnetwork1_22.1.2.3.4 LineCode=lv_line Length=6.834568736537479 Units=m
New Line.lv_cable_trafo15_lvnetwork1_23_main_grid Phases=4 Bus1=lv_node_trafo15_lvnetwork1_22.1.2.3.4 Bus2=lv_node_trafo15_lvnetwork1_23.1.2.3.4 LineCode=lv_line Length=19.2939582799272 Units=m
New Line.lv_cable_trafo15_lvnetwork1_24_main_grid Phases=4 Bus1=lv_node_trafo15_lvnetwork1_23.1.2.3.4 Bus2=lv_node_trafo15_lvnetwork1_24.1.2.3.4 LineCode=lv_line Length=7.429368326746096 Units=m
New Line.lv_cable_trafo15_lvnetwork1_to_home_19_arch4 Phases=4 Bus1=lv_node_trafo15_lvnetwork1_24.1.2.3.4 Bus2=1xhome1809.1.2.3.4 LineCode=lv_line_to_home Length=13.95744125411274 Units=m
New Line.lv_cable_trafo15_lvnetwork1_25_main_grid Phases=4 Bus1=lv_node_trafo15_lvnetwork1_24.1.2.3.4 Bus2=lv_node_trafo15_lvnetwork1_25.1.2.3.4 LineCode=lv_line Length=2.5184920065483527 Units=m
New Line.lv_cable_trafo15_lvnetwork1_to_home_26_arch4 Phases=4 Bus1=lv_node_trafo15_lvnetwork1_25.1.2.3.4 Bus2=1xhome1816.1.2.3.4 LineCode=lv_line_to_home Length=5.977811661665989 Units=m
New Line.lv_cable_trafo15_lvnetwork1_26_main_grid Phases=4 Bus1=lv_node_trafo15_lvnetwork1_25.1.2.3.4 Bus2=lv_node_trafo15_lvnetwork1_26.1.2.3.4 LineCode=lv_line Length=4.147372258966983 Units=m
New Line.lv_cable_trafo15_lvnetwork1_to_home_22_arch4 Phases=4 Bus1=lv_node_trafo15_lvnetwork1_26.1.2.3.4 Bus2=1xhome1812.1.2.3.4 LineCode=lv_line_to_home Length=13.977744593660807 Units=m
New Line.lv_cable_trafo15_lvnetwork1_27_main_grid Phases=4 Bus1=lv_node_trafo15_lvnetwork1_26.1.2.3.4 Bus2=lv_node_trafo15_lvnetwork1_27.1.2.3.4 LineCode=lv_line Length=2.577635878361327 Units=m
New Line.lv_cable_trafo15_lvnetwork1_to_home_25_arch4 Phases=4 Bus1=lv_node_trafo15_lvnetwork1_27.1.2.3.4 Bus2=1xhome1815.1.2.3.4 LineCode=lv_line_to_home Length=5.954631867394826 Units=m
New Line.lv_cable_trafo15_lvnetwork1_28_main_grid Phases=4 Bus1=lv_node_trafo15_lvnetwork1_27.1.2.3.4 Bus2=lv_node_trafo15_lvnetwork1_28.1.2.3.4 LineCode=lv_line Length=4.0817426087596145 Units=m
New Line.lv_cable_trafo15_lvnetwork1_to_home_21_arch4 Phases=4 Bus1=lv_node_trafo15_lvnetwork1_28.1.2.3.4 Bus2=1xhome1811.1.2.3.4 LineCode=lv_line_to_home Length=13.999654944934704 Units=m
New Line.lv_cable_trafo15_lvnetwork1_29_main_grid Phases=4 Bus1=lv_node_trafo15_lvnetwork1_28.1.2.3.4 Bus2=lv_node_trafo15_lvnetwork1_29.1.2.3.4 LineCode=lv_line Length=2.640494953775279 Units=m
New Line.lv_cable_trafo15_lvnetwork1_to_home_24_arch4 Phases=4 Bus1=lv_node_trafo15_lvnetwork1_29.1.2.3.4 Bus2=1xhome1814.1.2.3.4 LineCode=lv_line_to_home Length=5.929975892454268 Units=m
New Line.lv_cable_trafo15_lvnetwork1_30_main_grid Phases=4 Bus1=lv_node_trafo15_lvnetwork1_29.1.2.3.4 Bus2=lv_node_trafo15_lvnetwork1_30.1.2.3.4 LineCode=lv_line Length=4.024137065826417 Units=m
New Line.lv_cable_trafo15_lvnetwork1_to_home_20_arch4 Phases=4 Bus1=lv_node_trafo15_lvnetwork1_30.1.2.3.4 Bus2=1xhome1810.1.2.3.4 LineCode=lv_line_to_home Length=14.0220536439722 Units=m
New Line.lv_cable_trafo15_lvnetwork1_31_main_grid Phases=4 Bus1=lv_node_trafo15_lvnetwork1_30.1.2.3.4 Bus2=lv_node_trafo15_lvnetwork1_31.1.2.3.4 LineCode=lv_line Length=2.7008361036658433 Units=m
New Line.lv_cable_trafo15_lvnetwork1_to_home_23_arch4 Phases=4 Bus1=lv_node_trafo15_lvnetwork1_31.1.2.3.4 Bus2=1xhome1813.1.2.3.4 LineCode=lv_line_to_home Length=5.906917210474322 Units=m
New Line.lv_cable_trafo15_lvnetwork1_32_main_grid Phases=4 Bus1=lv_node_trafo15_lvnetwork1_31.1.2.3.4 Bus2=lv_node_trafo15_lvnetwork1_32.1.2.3.4 LineCode=lv_line Length=2.1833839999551903 Units=m
New Line.lv_cable_trafo15_lvnetwork1_33_main_grid Phases=4 Bus1=lv_node_trafo15_lvnetwork1_32.1.2.3.4 Bus2=lv_node_trafo15_lvnetwork1_33.1.2.3.4 LineCode=lv_line Length=1.327235665795766 Units=m
New Line.lv_cable_trafo15_lvnetwork1_to_home_30_arch4 Phases=4 Bus1=lv_node_trafo15_lvnetwork1_33.1.2.3.4 Bus2=1xhome1820.1.2.3.4 LineCode=lv_line_to_home Length=5.899057227909984 Units=m
New Line.lv_cable_trafo15_lvnetwork1_34_main_grid Phases=4 Bus1=lv_node_trafo15_lvnetwork1_33.1.2.3.4 Bus2=lv_node_trafo15_lvnetwork1_34.1.2.3.4 LineCode=lv_line Length=7.165214344343205 Units=m
New Line.lv_cable_trafo15_lvnetwork1_to_home_27_arch4 Phases=4 Bus1=lv_node_trafo15_lvnetwork1_34.1.2.3.4 Bus2=1xhome1817.1.2.3.4 LineCode=lv_line_to_home Length=14.035866388872707 Units=m
New Line.lv_cable_trafo15_lvnetwork1_35_main_grid Phases=4 Bus1=lv_node_trafo15_lvnetwork1_34.1.2.3.4 Bus2=lv_node_trafo15_lvnetwork1_35.1.2.3.4 LineCode=lv_line Length=2.558603853392012 Units=m
New Line.lv_cable_trafo15_lvnetwork1_to_home_29_arch4 Phases=4 Bus1=lv_node_trafo15_lvnetwork1_35.1.2.3.4 Bus2=1xhome1819.1.2.3.4 LineCode=lv_line_to_home Length=5.899833454423561 Units=m
New Line.lv_cable_trafo15_lvnetwork1_36_main_grid Phases=4 Bus1=lv_node_trafo15_lvnetwork1_35.1.2.3.4 Bus2=lv_node_trafo15_lvnetwork1_36.1.2.3.4 LineCode=lv_line Length=6.9176006011520474 Units=m
New Line.lv_cable_trafo15_lvnetwork1_to_home_28_arch4 Phases=4 Bus1=lv_node_trafo15_lvnetwork1_36.1.2.3.4 Bus2=1xhome1818.1.2.3.4 LineCode=lv_line_to_home Length=5.899353372858626 Units=m
New Line.lv_cable_trafo15_lvnetwork1_37_main_grid Phases=4 Bus1=lv_node_trafo15_lvnetwork1_36.1.2.3.4 Bus2=lv_node_trafo15_lvnetwork1_37.1.2.3.4 LineCode=lv_line Length=6.228834230234144 Units=m
New Line.lv_cable_trafo15_lvnetwork1_38_main_grid Phases=4 Bus1=lv_node_trafo15_lvnetwork1_37.1.2.3.4 Bus2=lv_node_trafo15_lvnetwork1_38.1.2.3.4 LineCode=lv_line Length=1.1627611650138192 Units=m
New Line.lv_cable_trafo15_lvnetwork1_to_home_31_arch4 Phases=4 Bus1=lv_node_trafo15_lvnetwork1_38.1.2.3.4 Bus2=1xhome1821.1.2.3.4 LineCode=lv_line_to_home Length=5.806123990182865 Units=m
New Line.lv_cable_trafo15_lvnetwork1_39_main_grid Phases=4 Bus1=lv_node_trafo15_lvnetwork1_38.1.2.3.4 Bus2=lv_node_trafo15_lvnetwork1_39.1.2.3.4 LineCode=lv_line Length=0.6983904427937334 Units=m
New Line.lv_cable_trafo15_lvnetwork1_40_main_grid Phases=4 Bus1=lv_node_trafo15_lvnetwork1_39.1.2.3.4 Bus2=lv_node_trafo15_lvnetwork1_40.1.2.3.4 LineCode=lv_line Length=3.7999136986188846 Units=m
New Line.lv_cable_trafo15_lvnetwork1_41_main_grid Phases=4 Bus1=lv_node_trafo15_lvnetwork1_40.1.2.3.4 Bus2=lv_node_trafo15_lvnetwork1_41.1.2.3.4 LineCode=lv_line Length=3.5960158298921057 Units=m
New Line.lv_cable_trafo15_lvnetwork1_to_home_32_arch4 Phases=4 Bus1=lv_node_trafo15_lvnetwork1_41.1.2.3.4 Bus2=1xhome1822.1.2.3.4 LineCode=lv_line_to_home Length=5.700189729523794 Units=m
New Line.lv_cable_trafo15_lvnetwork1_42_main_grid Phases=4 Bus1=lv_node_trafo15_lvnetwork1_41.1.2.3.4 Bus2=lv_node_trafo15_lvnetwork1_42.1.2.3.4 LineCode=lv_line Length=6.685564944717283 Units=m
New Line.lv_cable_trafo15_lvnetwork1_to_home_33_arch4 Phases=4 Bus1=lv_node_trafo15_lvnetwork1_42.1.2.3.4 Bus2=1xhome1823.1.2.3.4 LineCode=lv_line_to_home Length=5.687191611698416 Units=m
New Line.lv_cable_trafo15_lvnetwork1_43_main_grid Phases=4 Bus1=lv_node_trafo15_lvnetwork1_42.1.2.3.4 Bus2=lv_node_trafo15_lvnetwork1_43.1.2.3.4 LineCode=lv_line Length=6.884430790769248 Units=m
New Line.lv_cable_trafo15_lvnetwork1_to_home_34_arch4 Phases=4 Bus1=lv_node_trafo15_lvnetwork1_43.1.2.3.4 Bus2=1xhome1824.1.2.3.4 LineCode=lv_line_to_home Length=5.673675432807986 Units=m
New Line.lv_cable_trafo15_lvnetwork1_44_main_grid Phases=4 Bus1=lv_node_trafo15_lvnetwork1_43.1.2.3.4 Bus2=lv_node_trafo15_lvnetwork1_44.1.2.3.4 LineCode=lv_line Length=19.48839616437064 Units=m
New Line.lv_cable_trafo15_lvnetwork1_45_main_grid Phases=4 Bus1=lv_node_trafo15_lvnetwork1_44.1.2.3.4 Bus2=lv_node_trafo15_lvnetwork1_45.1.2.3.4 LineCode=lv_line Length=11.146875853393695 Units=m

! Load Definitions
New Load.1xhome1790_Ph1 Bus1=1xhome1790.1.4 Phases=1 Conn=wye Model=1 kV=0.23 kW=1 kvar=0.0
New Load.1xhome1790_Ph2 Bus1=1xhome1790.2.4 Phases=1 Conn=wye Model=1 kV=0.23 kW=1 kvar=0.0
New Load.1xhome1790_Ph3 Bus1=1xhome1790.3.4 Phases=1 Conn=wye Model=1 kV=0.23 kW=1 kvar=0.0
New Load.1xhome1791_Ph1 Bus1=1xhome1791.1.4 Phases=1 Conn=wye Model=1 kV=0.23 kW=1 kvar=0.0
New Load.1xhome1791_Ph2 Bus1=1xhome1791.2.4 Phases=1 Conn=wye Model=1 kV=0.23 kW=1 kvar=0.0
New Load.1xhome1791_Ph3 Bus1=1xhome1791.3.4 Phases=1 Conn=wye Model=1 kV=0.23 kW=1 kvar=0.0
New Load.1xhome1792_Ph1 Bus1=1xhome1792.1.4 Phases=1 Conn=wye Model=1 kV=0.23 kW=1 kvar=0.0
New Load.1xhome1792_Ph2 Bus1=1xhome1792.2.4 Phases=1 Conn=wye Model=1 kV=0.23 kW=1 kvar=0.0
New Load.1xhome1792_Ph3 Bus1=1xhome1792.3.4 Phases=1 Conn=wye Model=1 kV=0.23 kW=1 kvar=0.0
New Load.1xhome1793_Ph1 Bus1=1xhome1793.1.4 Phases=1 Conn=wye Model=1 kV=0.23 kW=1 kvar=0.0
New Load.1xhome1793_Ph2 Bus1=1xhome1793.2.4 Phases=1 Conn=wye Model=1 kV=0.23 kW=1 kvar=0.0
New Load.1xhome1793_Ph3 Bus1=1xhome1793.3.4 Phases=1 Conn=wye Model=1 kV=0.23 kW=1 kvar=0.0
New Load.1xhome1794_Ph1 Bus1=1xhome1794.1.4 Phases=1 Conn=wye Model=1 kV=0.23 kW=1 kvar=0.0
New Load.1xhome1794_Ph2 Bus1=1xhome1794.2.4 Phases=1 Conn=wye Model=1 kV=0.23 kW=1 kvar=0.0
New Load.1xhome1794_Ph3 Bus1=1xhome1794.3.4 Phases=1 Conn=wye Model=1 kV=0.23 kW=1 kvar=0.0
New Load.1xhome1795_Ph1 Bus1=1xhome1795.1.4 Phases=1 Conn=wye Model=1 kV=0.23 kW=1 kvar=0.0
New Load.1xhome1795_Ph2 Bus1=1xhome1795.2.4 Phases=1 Conn=wye Model=1 kV=0.23 kW=1 kvar=0.0
New Load.1xhome1795_Ph3 Bus1=1xhome1795.3.4 Phases=1 Conn=wye Model=1 kV=0.23 kW=1 kvar=0.0
New Load.1xhome1796_Ph1 Bus1=1xhome1796.1.4 Phases=1 Conn=wye Model=1 kV=0.23 kW=1 kvar=0.0
New Load.1xhome1796_Ph2 Bus1=1xhome1796.2.4 Phases=1 Conn=wye Model=1 kV=0.23 kW=1 kvar=0.0
New Load.1xhome1796_Ph3 Bus1=1xhome1796.3.4 Phases=1 Conn=wye Model=1 kV=0.23 kW=1 kvar=0.0
New Load.1xhome1797_Ph1 Bus1=1xhome1797.1.4 Phases=1 Conn=wye Model=1 kV=0.23 kW=1 kvar=0.0
New Load.1xhome1797_Ph2 Bus1=1xhome1797.2.4 Phases=1 Conn=wye Model=1 kV=0.23 kW=1 kvar=0.0
New Load.1xhome1797_Ph3 Bus1=1xhome1797.3.4 Phases=1 Conn=wye Model=1 kV=0.23 kW=1 kvar=0.0
New Load.1xhome1802_Ph1 Bus1=1xhome1802.1.4 Phases=1 Conn=wye Model=1 kV=0.23 kW=1 kvar=0.0
New Load.1xhome1802_Ph2 Bus1=1xhome1802.2.4 Phases=1 Conn=wye Model=1 kV=0.23 kW=1 kvar=0.0
New Load.1xhome1802_Ph3 Bus1=1xhome1802.3.4 Phases=1 Conn=wye Model=1 kV=0.23 kW=1 kvar=0.0
New Load.1xhome1798_Ph1 Bus1=1xhome1798.1.4 Phases=1 Conn=wye Model=1 kV=0.23 kW=1 kvar=0.0
New Load.1xhome1798_Ph2 Bus1=1xhome1798.2.4 Phases=1 Conn=wye Model=1 kV=0.23 kW=1 kvar=0.0
New Load.1xhome1798_Ph3 Bus1=1xhome1798.3.4 Phases=1 Conn=wye Model=1 kV=0.23 kW=1 kvar=0.0
New Load.1xhome1799_Ph1 Bus1=1xhome1799.1.4 Phases=1 Conn=wye Model=1 kV=0.23 kW=1 kvar=0.0
New Load.1xhome1799_Ph2 Bus1=1xhome1799.2.4 Phases=1 Conn=wye Model=1 kV=0.23 kW=1 kvar=0.0
New Load.1xhome1799_Ph3 Bus1=1xhome1799.3.4 Phases=1 Conn=wye Model=1 kV=0.23 kW=1 kvar=0.0
New Load.1xhome1800_Ph1 Bus1=1xhome1800.1.4 Phases=1 Conn=wye Model=1 kV=0.23 kW=1 kvar=0.0
New Load.1xhome1800_Ph2 Bus1=1xhome1800.2.4 Phases=1 Conn=wye Model=1 kV=0.23 kW=1 kvar=0.0
New Load.1xhome1800_Ph3 Bus1=1xhome1800.3.4 Phases=1 Conn=wye Model=1 kV=0.23 kW=1 kvar=0.0
New Load.1xhome1801_Ph1 Bus1=1xhome1801.1.4 Phases=1 Conn=wye Model=1 kV=0.23 kW=1 kvar=0.0
New Load.1xhome1801_Ph2 Bus1=1xhome1801.2.4 Phases=1 Conn=wye Model=1 kV=0.23 kW=1 kvar=0.0
New Load.1xhome1801_Ph3 Bus1=1xhome1801.3.4 Phases=1 Conn=wye Model=1 kV=0.23 kW=1 kvar=0.0
New Load.1xhome1807_Ph1 Bus1=1xhome1807.1.4 Phases=1 Conn=wye Model=1 kV=0.23 kW=1 kvar=0.0
New Load.1xhome1807_Ph2 Bus1=1xhome1807.2.4 Phases=1 Conn=wye Model=1 kV=0.23 kW=1 kvar=0.0
New Load.1xhome1807_Ph3 Bus1=1xhome1807.3.4 Phases=1 Conn=wye Model=1 kV=0.23 kW=1 kvar=0.0
New Load.1xhome1808_Ph1 Bus1=1xhome1808.1.4 Phases=1 Conn=wye Model=1 kV=0.23 kW=1 kvar=0.0
New Load.1xhome1808_Ph2 Bus1=1xhome1808.2.4 Phases=1 Conn=wye Model=1 kV=0.23 kW=1 kvar=0.0
New Load.1xhome1808_Ph3 Bus1=1xhome1808.3.4 Phases=1 Conn=wye Model=1 kV=0.23 kW=1 kvar=0.0
New Load.1xhome1803_Ph1 Bus1=1xhome1803.1.4 Phases=1 Conn=wye Model=1 kV=0.23 kW=1 kvar=0.0
New Load.1xhome1803_Ph2 Bus1=1xhome1803.2.4 Phases=1 Conn=wye Model=1 kV=0.23 kW=1 kvar=0.0
New Load.1xhome1803_Ph3 Bus1=1xhome1803.3.4 Phases=1 Conn=wye Model=1 kV=0.23 kW=1 kvar=0.0
New Load.1xhome1804_Ph1 Bus1=1xhome1804.1.4 Phases=1 Conn=wye Model=1 kV=0.23 kW=1 kvar=0.0
New Load.1xhome1804_Ph2 Bus1=1xhome1804.2.4 Phases=1 Conn=wye Model=1 kV=0.23 kW=1 kvar=0.0
New Load.1xhome1804_Ph3 Bus1=1xhome1804.3.4 Phases=1 Conn=wye Model=1 kV=0.23 kW=1 kvar=0.0
New Load.1xhome1805_Ph1 Bus1=1xhome1805.1.4 Phases=1 Conn=wye Model=1 kV=0.23 kW=1 kvar=0.0
New Load.1xhome1805_Ph2 Bus1=1xhome1805.2.4 Phases=1 Conn=wye Model=1 kV=0.23 kW=1 kvar=0.0
New Load.1xhome1805_Ph3 Bus1=1xhome1805.3.4 Phases=1 Conn=wye Model=1 kV=0.23 kW=1 kvar=0.0
New Load.1xhome1806_Ph1 Bus1=1xhome1806.1.4 Phases=1 Conn=wye Model=1 kV=0.23 kW=1 kvar=0.0
New Load.1xhome1806_Ph2 Bus1=1xhome1806.2.4 Phases=1 Conn=wye Model=1 kV=0.23 kW=1 kvar=0.0
New Load.1xhome1806_Ph3 Bus1=1xhome1806.3.4 Phases=1 Conn=wye Model=1 kV=0.23 kW=1 kvar=0.0
New Load.1xhome1809_Ph1 Bus1=1xhome1809.1.4 Phases=1 Conn=wye Model=1 kV=0.23 kW=1 kvar=0.0
New Load.1xhome1809_Ph2 Bus1=1xhome1809.2.4 Phases=1 Conn=wye Model=1 kV=0.23 kW=1 kvar=0.0
New Load.1xhome1809_Ph3 Bus1=1xhome1809.3.4 Phases=1 Conn=wye Model=1 kV=0.23 kW=1 kvar=0.0
New Load.1xhome1816_Ph1 Bus1=1xhome1816.1.4 Phases=1 Conn=wye Model=1 kV=0.23 kW=1 kvar=0.0
New Load.1xhome1816_Ph2 Bus1=1xhome1816.2.4 Phases=1 Conn=wye Model=1 kV=0.23 kW=1 kvar=0.0
New Load.1xhome1816_Ph3 Bus1=1xhome1816.3.4 Phases=1 Conn=wye Model=1 kV=0.23 kW=1 kvar=0.0
New Load.1xhome1812_Ph1 Bus1=1xhome1812.1.4 Phases=1 Conn=wye Model=1 kV=0.23 kW=1 kvar=0.0
New Load.1xhome1812_Ph2 Bus1=1xhome1812.2.4 Phases=1 Conn=wye Model=1 kV=0.23 kW=1 kvar=0.0
New Load.1xhome1812_Ph3 Bus1=1xhome1812.3.4 Phases=1 Conn=wye Model=1 kV=0.23 kW=1 kvar=0.0
New Load.1xhome1815_Ph1 Bus1=1xhome1815.1.4 Phases=1 Conn=wye Model=1 kV=0.23 kW=1 kvar=0.0
New Load.1xhome1815_Ph2 Bus1=1xhome1815.2.4 Phases=1 Conn=wye Model=1 kV=0.23 kW=1 kvar=0.0
New Load.1xhome1815_Ph3 Bus1=1xhome1815.3.4 Phases=1 Conn=wye Model=1 kV=0.23 kW=1 kvar=0.0
New Load.1xhome1811_Ph1 Bus1=1xhome1811.1.4 Phases=1 Conn=wye Model=1 kV=0.23 kW=1 kvar=0.0
New Load.1xhome1811_Ph2 Bus1=1xhome1811.2.4 Phases=1 Conn=wye Model=1 kV=0.23 kW=1 kvar=0.0
New Load.1xhome1811_Ph3 Bus1=1xhome1811.3.4 Phases=1 Conn=wye Model=1 kV=0.23 kW=1 kvar=0.0
New Load.1xhome1814_Ph1 Bus1=1xhome1814.1.4 Phases=1 Conn=wye Model=1 kV=0.23 kW=1 kvar=0.0
New Load.1xhome1814_Ph2 Bus1=1xhome1814.2.4 Phases=1 Conn=wye Model=1 kV=0.23 kW=1 kvar=0.0
New Load.1xhome1814_Ph3 Bus1=1xhome1814.3.4 Phases=1 Conn=wye Model=1 kV=0.23 kW=1 kvar=0.0
New Load.1xhome1810_Ph1 Bus1=1xhome1810.1.4 Phases=1 Conn=wye Model=1 kV=0.23 kW=1 kvar=0.0
New Load.1xhome1810_Ph2 Bus1=1xhome1810.2.4 Phases=1 Conn=wye Model=1 kV=0.23 kW=1 kvar=0.0
New Load.1xhome1810_Ph3 Bus1=1xhome1810.3.4 Phases=1 Conn=wye Model=1 kV=0.23 kW=1 kvar=0.0
New Load.1xhome1813_Ph1 Bus1=1xhome1813.1.4 Phases=1 Conn=wye Model=1 kV=0.23 kW=1 kvar=0.0
New Load.1xhome1813_Ph2 Bus1=1xhome1813.2.4 Phases=1 Conn=wye Model=1 kV=0.23 kW=1 kvar=0.0
New Load.1xhome1813_Ph3 Bus1=1xhome1813.3.4 Phases=1 Conn=wye Model=1 kV=0.23 kW=1 kvar=0.0
New Load.1xhome1820_Ph1 Bus1=1xhome1820.1.4 Phases=1 Conn=wye Model=1 kV=0.23 kW=1 kvar=0.0
New Load.1xhome1820_Ph2 Bus1=1xhome1820.2.4 Phases=1 Conn=wye Model=1 kV=0.23 kW=1 kvar=0.0
New Load.1xhome1820_Ph3 Bus1=1xhome1820.3.4 Phases=1 Conn=wye Model=1 kV=0.23 kW=1 kvar=0.0
New Load.1xhome1817_Ph1 Bus1=1xhome1817.1.4 Phases=1 Conn=wye Model=1 kV=0.23 kW=1 kvar=0.0
New Load.1xhome1817_Ph2 Bus1=1xhome1817.2.4 Phases=1 Conn=wye Model=1 kV=0.23 kW=1 kvar=0.0
New Load.1xhome1817_Ph3 Bus1=1xhome1817.3.4 Phases=1 Conn=wye Model=1 kV=0.23 kW=1 kvar=0.0
New Load.1xhome1819_Ph1 Bus1=1xhome1819.1.4 Phases=1 Conn=wye Model=1 kV=0.23 kW=1 kvar=0.0
New Load.1xhome1819_Ph2 Bus1=1xhome1819.2.4 Phases=1 Conn=wye Model=1 kV=0.23 kW=1 kvar=0.0
New Load.1xhome1819_Ph3 Bus1=1xhome1819.3.4 Phases=1 Conn=wye Model=1 kV=0.23 kW=1 kvar=0.0
New Load.1xhome1818_Ph1 Bus1=1xhome1818.1.4 Phases=1 Conn=wye Model=1 kV=0.23 kW=1 kvar=0.0
New Load.1xhome1818_Ph2 Bus1=1xhome1818.2.4 Phases=1 Conn=wye Model=1 kV=0.23 kW=1 kvar=0.0
New Load.1xhome1818_Ph3 Bus1=1xhome1818.3.4 Phases=1 Conn=wye Model=1 kV=0.23 kW=1 kvar=0.0
New Load.1xhome1821_Ph1 Bus1=1xhome1821.1.4 Phases=1 Conn=wye Model=1 kV=0.23 kW=1 kvar=0.0
New Load.1xhome1821_Ph2 Bus1=1xhome1821.2.4 Phases=1 Conn=wye Model=1 kV=0.23 kW=1 kvar=0.0
New Load.1xhome1821_Ph3 Bus1=1xhome1821.3.4 Phases=1 Conn=wye Model=1 kV=0.23 kW=1 kvar=0.0
New Load.1xhome1822_Ph1 Bus1=1xhome1822.1.4 Phases=1 Conn=wye Model=1 kV=0.23 kW=1 kvar=0.0
New Load.1xhome1822_Ph2 Bus1=1xhome1822.2.4 Phases=1 Conn=wye Model=1 kV=0.23 kW=1 kvar=0.0
New Load.1xhome1822_Ph3 Bus1=1xhome1822.3.4 Phases=1 Conn=wye Model=1 kV=0.23 kW=1 kvar=0.0
New Load.1xhome1823_Ph1 Bus1=1xhome1823.1.4 Phases=1 Conn=wye Model=1 kV=0.23 kW=1 kvar=0.0
New Load.1xhome1823_Ph2 Bus1=1xhome1823.2.4 Phases=1 Conn=wye Model=1 kV=0.23 kW=1 kvar=0.0
New Load.1xhome1823_Ph3 Bus1=1xhome1823.3.4 Phases=1 Conn=wye Model=1 kV=0.23 kW=1 kvar=0.0
New Load.1xhome1824_Ph1 Bus1=1xhome1824.1.4 Phases=1 Conn=wye Model=1 kV=0.23 kW=1 kvar=0.0
New Load.1xhome1824_Ph2 Bus1=1xhome1824.2.4 Phases=1 Conn=wye Model=1 kV=0.23 kW=1 kvar=0.0
New Load.1xhome1824_Ph3 Bus1=1xhome1824.3.4 Phases=1 Conn=wye Model=1 kV=0.23 kW=1 kvar=0.0

! Final Configurations
Set VoltageBases = [10.0, 0.4]
CalcVoltageBases
SetkVBase Bus=mv_import_joint_trafo15_lvnetwork1 kVLL=10.0
SetkVBase Bus=lvjoint93 kVLL=0.4

! Solve
Set mode=snapshot
! Solve
