Clear

Set DefaultBaseFrequency=50

! Swing or Source Bar
New circuit.trafo4_lvnetwork4_1 phases=3 pu=1.0 basekv=10.0 bus1=mv_import_joint_trafo4_lvnetwork4

! Trafo XFMRCodes
Redirect XFMRCode.dss

! Trafo
New Transformer.transformer27 Xfmrcode=testtrafotype Buses=[mv_import_joint_trafo4_lvnetwork4  lvjoint29.1.2.3] kVs=[10.0 0.4]

! LineCodes
Redirect LineCode.dss

! Lines
New Line.lv_cable_trafo4_lvnetwork4_2_main_grid Phases=4 Bus1=lvjoint29.1.2.3.0 Bus2=lv_node_trafo4_lvnetwork4_2.1.2.3.4 LineCode=lv_line Length=36.61468696400102 Units=m
New Line.lv_cable_trafo4_lvnetwork4_3_main_grid Phases=4 Bus1=lv_node_trafo4_lvnetwork4_2.1.2.3.4 Bus2=lv_node_trafo4_lvnetwork4_3.1.2.3.4 LineCode=lv_line Length=113.89336015127569 Units=m
New Line.lv_cable_trafo4_lvnetwork4_4_main_grid Phases=4 Bus1=lv_node_trafo4_lvnetwork4_3.1.2.3.4 Bus2=lv_node_trafo4_lvnetwork4_4.1.2.3.4 LineCode=lv_line Length=23.336210060149696 Units=m
New Line.lv_cable_trafo4_lvnetwork4_5_main_grid Phases=4 Bus1=lv_node_trafo4_lvnetwork4_4.1.2.3.4 Bus2=lv_node_trafo4_lvnetwork4_5.1.2.3.4 LineCode=lv_line Length=0.22949074057219995 Units=m
New Line.lv_cable_trafo4_lvnetwork4_6_main_grid Phases=4 Bus1=lv_node_trafo4_lvnetwork4_5.1.2.3.4 Bus2=lv_node_trafo4_lvnetwork4_6.1.2.3.4 LineCode=lv_line Length=22.091172928502537 Units=m
New Line.lv_cable_trafo4_lvnetwork4_to_home_1_arch5 Phases=4 Bus1=lv_node_trafo4_lvnetwork4_6.1.2.3.4 Bus2=3xhome586.1.2.3.4 LineCode=lv_line_to_home Length=1.474789598927481 Units=m
New Line.lv_cable_trafo4_lvnetwork4_7_main_grid Phases=4 Bus1=lv_node_trafo4_lvnetwork4_6.1.2.3.4 Bus2=lv_node_trafo4_lvnetwork4_7.1.2.3.4 LineCode=lv_line Length=5.8090725421705605 Units=m
New Line.lv_cable_trafo4_lvnetwork4_to_home_0_arch5 Phases=4 Bus1=lv_node_trafo4_lvnetwork4_7.1.2.3.4 Bus2=2xhome585.1.2.3.4 LineCode=lv_line_to_home Length=1.5372236743045211 Units=m
New Line.lv_cable_trafo4_lvnetwork4_8_main_grid Phases=4 Bus1=lv_node_trafo4_lvnetwork4_7.1.2.3.4 Bus2=lv_node_trafo4_lvnetwork4_8.1.2.3.4 LineCode=lv_line Length=17.227141614192863 Units=m
New Line.lv_cable_trafo4_lvnetwork4_9_main_grid Phases=4 Bus1=lv_node_trafo4_lvnetwork4_8.1.2.3.4 Bus2=lv_node_trafo4_lvnetwork4_9.1.2.3.4 LineCode=lv_line Length=2.4305805910727645 Units=m
New Line.lv_cable_trafo4_lvnetwork4_to_home_2_arch5 Phases=4 Bus1=lv_node_trafo4_lvnetwork4_9.1.2.3.4 Bus2=5xhome587.1.2.3.4 LineCode=lv_line_to_home Length=0.9899308368587891 Units=m
New Line.lv_cable_trafo4_lvnetwork4_10_main_grid Phases=4 Bus1=lv_node_trafo4_lvnetwork4_9.1.2.3.4 Bus2=lv_node_trafo4_lvnetwork4_10.1.2.3.4 LineCode=lv_line Length=0.23903974565356995 Units=m
New Line.lv_cable_trafo4_lvnetwork4_11_main_grid Phases=4 Bus1=lv_node_trafo4_lvnetwork4_10.1.2.3.4 Bus2=lv_node_trafo4_lvnetwork4_11.1.2.3.4 LineCode=lv_line Length=20.646477332253998 Units=m
New Line.lv_cable_trafo4_lvnetwork4_to_home_3_arch5 Phases=4 Bus1=lv_node_trafo4_lvnetwork4_11.1.2.3.4 Bus2=1xhome588.1.2.3.4 LineCode=lv_line_to_home Length=1.4994620345265606 Units=m
New Line.lv_cable_trafo4_lvnetwork4_12_main_grid Phases=4 Bus1=lv_node_trafo4_lvnetwork4_11.1.2.3.4 Bus2=lv_node_trafo4_lvnetwork4_12.1.2.3.4 LineCode=lv_line Length=3.3023534865318447 Units=m

! Load Definitions
New Load.3xhome586_Ph1 Bus1=3xhome586.1.4 Phases=1 Conn=wye Model=1 kV=0.23 kW=1 kvar=0.0
New Load.3xhome586_Ph2 Bus1=3xhome586.2.4 Phases=1 Conn=wye Model=1 kV=0.23 kW=1 kvar=0.0
New Load.3xhome586_Ph3 Bus1=3xhome586.3.4 Phases=1 Conn=wye Model=1 kV=0.23 kW=1 kvar=0.0
New Load.2xhome585_Ph1 Bus1=2xhome585.1.4 Phases=1 Conn=wye Model=1 kV=0.23 kW=1 kvar=0.0
New Load.2xhome585_Ph2 Bus1=2xhome585.2.4 Phases=1 Conn=wye Model=1 kV=0.23 kW=1 kvar=0.0
New Load.2xhome585_Ph3 Bus1=2xhome585.3.4 Phases=1 Conn=wye Model=1 kV=0.23 kW=1 kvar=0.0
New Load.5xhome587_Ph1 Bus1=5xhome587.1.4 Phases=1 Conn=wye Model=1 kV=0.23 kW=1 kvar=0.0
New Load.5xhome587_Ph2 Bus1=5xhome587.2.4 Phases=1 Conn=wye Model=1 kV=0.23 kW=1 kvar=0.0
New Load.5xhome587_Ph3 Bus1=5xhome587.3.4 Phases=1 Conn=wye Model=1 kV=0.23 kW=1 kvar=0.0
New Load.1xhome588_Ph1 Bus1=1xhome588.1.4 Phases=1 Conn=wye Model=1 kV=0.23 kW=1 kvar=0.0
New Load.1xhome588_Ph2 Bus1=1xhome588.2.4 Phases=1 Conn=wye Model=1 kV=0.23 kW=1 kvar=0.0
New Load.1xhome588_Ph3 Bus1=1xhome588.3.4 Phases=1 Conn=wye Model=1 kV=0.23 kW=1 kvar=0.0

! Final Configurations
Set VoltageBases = [10.0, 0.4]
CalcVoltageBases
SetkVBase Bus=mv_import_joint_trafo4_lvnetwork4 kVLL=10.0
SetkVBase Bus=lvjoint29 kVLL=0.4

! Solve
Set mode=snapshot
! Solve
